# OpenSim document version 40500
InverseKinematicsTool:
  model_file: $osimfile
  accuracy: $accuracy
  time_range: $tstart $tend
  marker_file: $trcfilename
  IKTaskSet:
    IKMarkerTask LH_WRIST: apply=true weight=1
    IKMarkerTask LH_THUMB_CMC: apply=true weight=0.2
    IKMarkerTask LH_THUMB_MCP: apply=true weight=0.2
    IKMarkerTask LH_THUMB_IP: apply=true weight=0.8
    IKMarkerTask LH_THUMB_TIP: apply=true weight=1
    IKMarkerTask LH_INDEX_FINGER_MCP: apply=true weight=0.2
    IKMarkerTask LH_INDEX_FINGER_PIP: apply=true weight=0.2
    IKMarkerTask LH_INDEX_FINGER_DIP: apply=true weight=0.8
    IKMarkerTask LH_INDEX_FINGER_TIP: apply=true weight=1
    IKMarkerTask LH_MIDDLE_FINGER_MCP: apply=true weight=0.2
    IKMarkerTask LH_MIDDLE_FINGER_PIP: apply=true weight=0.2
    IKMarkerTask LH_MIDDLE_FINGER_DIP: apply=true weight=0.8
    IKMarkerTask LH_MIDDLE_FINGER_TIP: apply=true weight=1
    IKMarkerTask LH_RING_FINGER_MCP: apply=true weight=0.2
    IKMarkerTask LH_RING_FINGER_PIP: apply=true weight=0.2
    IKMarkerTask LH_RING_FINGER_DIP: apply=true weight=0.8
    IKMarkerTask LH_RING_FINGER_TIP: apply=true weight=1
    IKMarkerTask LH_PINKY_MCP: apply=true weight=0.5
    IKMarkerTask LH_PINKY_PIP: apply=true weight=0.5
    IKMarkerTask LH_PINKY_DIP: apply=true weight=0.8
    IKMarkerTask LH_PINKY_TIP: apply=true weight=1
